*Heading
** Job name: plastic_beam Model name: Model-1
** Generated by: Abaqus/CAE 2018
*Preprint, echo=NO, model=NO, history=NO, contact=NO
** ----------------------------------------------------------------
**
** PART INSTANCE: Part-1-1
**
*Node
      1,           1.,           1.,          20.
      2,           1.,           0.,          20.
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*Element, type=C3D8
 1,  64,  65,  68,  67,   1,   2,   5,   4
 2,  65,  66,  69,  68,   2,   3,   6,   5
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*Nset, nset=Part-1-1_Set-1, generate
   1,  189,    1
*Elset, elset=Part-1-1_Set-1, generate
  1,  80,   1
** Section: Section-1
*Solid Section, elset=Part-1-1_Set-1, material=Material-1
,
*System
*Nset, nset=Set-1, generate
   3,  129,   63
*Elset, elset=Set-1
  2, 42
*Nset, nset=Set-2, generate
  63,  189,   63
*Elset, elset=Set-2
 40, 80
*Elset, elset=_Surf-1_S6, generate
  1,  79,   2
*Surface, type=ELEMENT, name=Surf-1
_Surf-1_S6, S6
**
** MATERIALS
**
*Material, name=Material-1
*Elastic
200000., 0.3
*Plastic
100.,0.
** ----------------------------------------------------------------
**
** STEP: Step-1
**
*Step, name=Step-1, nlgeom=NO
*Static
1., 1., 1e-05, 1.
**
** BOUNDARY CONDITIONS
**
** Name: BC-1 Type: Displacement/Rotation
*Boundary
Set-1, 1, 1
Set-1, 2, 2
Set-1, 3, 3
** Name: BC-2 Type: Displacement/Rotation
*Boundary
Set-2, 1, 1
Set-2, 2, 2
**
** LOADS
**
** Name: Load-1   Type: Pressure
*Dsload
Surf-1, P, 100.
**
** OUTPUT REQUESTS
**
*Restart, write, frequency=0
**
** FIELD OUTPUT: F-Output-1
**
*Output, field, variable=PRESELECT
**
** HISTORY OUTPUT: H-Output-1
**
*Output, history, variable=PRESELECT
*End Step
