*Heading
** Job name: Job-1 Model name: Model-1
** Generated by: Abaqus/CAE 2019.HF4
*Preprint, echo=NO, model=NO, history=NO, contact=NO
** ----------------------------------------------------------------
**
** PART INSTANCE: Part-1-1
**
*Node
      1,           1.,           1.,           1.
      2,           1.,           0.,           1.
      3,           1.,           1.,           0.
      4,           1.,           0.,           0.
      5,           0.,           1.,           1.
      6,           0.,           0.,           1.
      7,           0.,           1.,           0.
      8,           0.,           0.,           0.
*Element, type=C3D8
1, 5, 6, 8, 7, 1, 2, 4, 3
*Nset, nset=Part-1-1_Set-1, generate
 1,  8,  1
*Nset, nset=top_surf
 1,3,5,7
*Elset, elset=Part-1-1_Set-1
 1,
** Section: Section-1
*Solid Section, elset=Part-1-1_Set-1, material=chaboche_thermal
,
*System
*Nset, nset=Set-1
 8,
*Nset, nset=Set-2
 4,
*Nset, nset=Set-3
 6,
*Nset, nset=Set-4
 2,
*Elset, elset=_Surf-1_S6
 1,
*Surface, type=ELEMENT, name=Surf-1
_Surf-1_S6, S6
**
** MATERIALS
**
**Material, name=Material-1
**Elastic
**200000., 0.3
*MATERIAL, NAME=chaboche_thermal
*DEPVAR
42
*USER MATERIAL, CONSTANTS=1
0.0
** ----------------------------------------------------------------
**
*INITIAL CONDITIONS, TYPE=TEMPERATURE
Part-1-1_Set-1, 23.0
** STEP: Step-1
**
*Step, name=Step-1, nlgeom=NO
*Static
0.1, 1., 1e-05, 0.1
**
** BOUNDARY CONDITIONS
**
** Name: BC-1 Type: Displacement/Rotation
*Boundary
Set-1, 1, 1
Set-1, 2, 2
Set-1, 3, 3
** Name: BC-2 Type: Displacement/Rotation
*Boundary
Set-2, 2, 2
Set-2, 3, 3
** Name: BC-3 Type: Displacement/Rotation
*Boundary
Set-3, 1, 1
Set-3, 2, 2
** Name: BC-4 Type: Displacement/Rotation
*Boundary
Set-4, 2, 2
**
** LOADS
**
** Name: Load-1   Type: Pressure
**Dsload
**Surf-1, P, -1.
*Boundary
top_surf, 2, 2, 0.005
*Output, field, variable=PRESELECT
*ELEMENT OUTPUT, VARIABLE = PRESELECT
TEMP
SDV7
*End Step
*Step, name=Step-2
*Static
0.1, 1., 1e-05, 0.1
*Boundary
top_surf, 2, 2, -0.005
*TEMPERATURE
Part-1-1_Set-1, 400.0
*End Step
*Step, name=Step-3
*Static
0.1, 1., 1e-05, 0.1
*Boundary
top_surf, 2, 2, 0.005
*TEMPERATURE
Part-1-1_Set-1, 23.0
*End Step
*Step, name=Step-4
*Static
0.1, 1., 1e-05, 0.1
*Boundary
top_surf, 2, 2, -0.005
*TEMPERATURE
Part-1-1_Set-1, 400.0
*End Step
*Step, name=Step-5
*Static
0.1, 1., 1e-05, 0.1
*Boundary
top_surf, 2, 2, 0.005
*TEMPERATURE
Part-1-1_Set-1, 23.0
*End Step
*Step, name=Step-6
*Static
0.1, 1., 1e-05, 0.1
*Boundary
top_surf, 2, 2, -0.005
*TEMPERATURE
Part-1-1_Set-1, 400.0
*End Step
*Step, name=Step-7
*Static
0.1, 1., 1e-05, 0.1
*Boundary
top_surf, 2, 2, 0.005
*TEMPERATURE
Part-1-1_Set-1, 23.0
*End Step
*Step, name=Step-8
*Static
0.1, 1., 1e-05, 0.1
*Boundary
top_surf, 2, 2, -0.005
*TEMPERATURE
Part-1-1_Set-1, 400.0
*End Step
*Step, name=Step-9
*Static
0.1, 1., 1e-05, 0.1
*Boundary
top_surf, 2, 2, 0.005
*TEMPERATURE
Part-1-1_Set-1, 23.0
*End Step
*Step, name=Step-10
*Static
0.1, 1., 1e-05, 0.1
*Boundary
top_surf, 2, 2, -0.005
*TEMPERATURE
Part-1-1_Set-1, 400.0
*End Step
*Step, name=Step-11
*Static
0.1, 1., 1e-05, 0.1
*Boundary
top_surf, 2, 2, 0.005
*TEMPERATURE
Part-1-1_Set-1, 23.0
*End Step
*Step, name=Step-12
*Static
0.1, 1., 1e-05, 0.1
*Boundary
top_surf, 2, 2, -0.005
*TEMPERATURE
Part-1-1_Set-1, 400.0
*End Step
*Step, name=Step-13
*Static
0.1, 1., 1e-05, 0.1
*Boundary
top_surf, 2, 2, 0.005
*TEMPERATURE
Part-1-1_Set-1, 23.0
*End Step
*Step, name=Step-14
*Static
0.1, 1., 1e-05, 0.1
*Boundary
top_surf, 2, 2, -0.005
*TEMPERATURE
Part-1-1_Set-1, 400.0
*End Step
